// SBML level 2 version 4

model sigma_32()

  // Compartments:
  compartment default = 1 volume;
  compartment citosol in default = 1 volume;

  // Species:
  substanceOnly species S_32_gen in citosol = 1e-9; S_32_gen is "S-32 gen";
  substanceOnly species S_32_mRNA in citosol = 6e-9; S_32_mRNA is "S-32 mRNA";
  substanceOnly species ftshgen in citosol = 1e-9;
  substanceOnly species S_32 in citosol = 9e-9; S_32 is "S-32";
  substanceOnly species ES_32 in citosol = 1e-9; ES_32 is "ES-32";
  substanceOnly species jcomp_gen in citosol = 1e-9;
  substanceOnly species jcomp_S_32 in citosol = 7e-9; jcomp_S_32 is "jcomp S-32";
  substanceOnly species jcomp in citosol = 5.6e-8;
  species s32_mRNA_degraded in citosol = 0;
  substanceOnly species FtsH in citosol = 9.3e-8;
  species FtsH_degraded in citosol = 0;
  species jcomp_degraded in citosol = 0;

  // Reactions:
  re1: S_32_gen => S_32_mRNA; S_32_gen*k1;
    k1 = 1.4e-5 substance;
  re2: S_32_mRNA => s32_mRNA_degraded; S_32_mRNA*k2;
    k2 = 1.4e-6 substance;
  re4: S_32_mRNA => S_32; S_32_mRNA*k3;
    k3 = 0.007 substance;
  re5: S_32 => ES_32; S_32*k4;
    k4 = 0.7 substance;
  re6: ES_32 => S_32; ES_32*k5;
    k5 = 0.13 substance;
  re7: ftshgen + ES_32 => FtsH + S_32; ftshgen*ES_32*k6;
    k6 = 0.00441 substance;
  re8: FtsH => FtsH_degraded; FtsH*k7;
    k7 = 7.4e-11 substance;
  re9: jcomp_gen + ES_32 => S_32 + jcomp; jcomp_gen*ES_32*k8;
    k8 = 0.00441 substance;
  re10: jcomp => jcomp_degraded; jcomp*k9;
    k9 = 6.4e-10 substance;
  re12: jcomp + S_32 => jcomp_S_32; jcomp*S_32*k10;
    k10 = 0.000327 substance;
  re13: jcomp_S_32 => jcomp + S_32; jcomp_S_32*k11;
    k11 = 0.00044 substance;
  re14: FtsH + jcomp_S_32 => S_32 + jcomp; FtsH*jcomp_S_32*k12;
    k12 = 1.28e-9 substance;

  // Unit definitions:
  unit substance = mole;
  unit volume = litre;
  unit area = metre^2;
  unit length = metre;
  unit time = second;
end
